# Worksheet setting: ORIGIN = 1
# ANALISIS Y DISEÑO DE LOSA DE FUNDACION
# (Método rígido Convencional/ACI 318-19)
# MATERIALES
# - Resistencia Característica del Hormigón  f'c := 280 kgf/cm^2
# - Modulo de Fluencia del Acero de Refuerzo  fy := 4200 kgf/cm^2
# - Peso unitario del  Concreto  γ_c := 2400 kgf/m^3
# - Modulo de Elasticidad del Acero de Refuerzo  E_s := 2.1*10^6 kgf/cm^2
# - Recubrimiento de la Fundación  rec := 7.5 cm
# PROPIEDADES DEL SUELO
# - Capacidad Admisible del Suelo  q_adm := 1.3 kgf/cm^2  FS := 3
# - Peso unitario del Suelo  γ_suelo := 1825 kgf/m^3
# - Profundidad de Fundación  D_f := 4.1 m
# DIMENSIONES DE COLUMNA Y CARGAS
table  # each column defines a variable
    Columna | id | a (cm) | b (cm) | P (tonnef) | P_u (tonnef)
    1 | "e" | 60 | 60 | 49.00 | 70.65
    2 | "m2" | 60 | 60 | 60.13 | 86.36
    3 | "m2" | 60 | 60 | 71.12 | 102.04
    4 | "m2" | 30 | 60 | 41.76 | 59.84
    5 | "m2" | 60 | 30 | 32.81 | 47.44
    6 | "m1" | 60 | 30 | 25.02 | 36.00
    7 | "m1" | 60 | 60 | 101.96 | 148.14
    8 | "c" | 60 | 60 | 131.12 | 190.44
    9 | "c" | 60 | 60 | 139.34 | 201.96
    10 | "c" | 60 | 60 | 137.11 | 198.76
    11 | "c" | 60 | 30 | 63.71 | 92.23
    12 | "m1" | 60 | 30 | 32.87 | 47.36
    13 | "m1" | 60 | 60 | 97.42 | 141.52
    14 | "c" | 60 | 60 | 95.21 | 137.49
    15 | "c" | 60 | 60 | 224.65 | 326.34
    16 | "c" | 60 | 60 | 225.40 | 329.74
    17 | "c" | 60 | 30 | 140.52 | 206.79
    18 | "m1" | 60 | 30 | 60.83 | 88.95
    19 | "m1" | 60 | 60 | 105.78 | 153.77
    20 | "c" | 60 | 60 | 96.21 | 139.24
    21 | "c" | 60 | 60 | 72.19 | 103.84
    22 | "c" | 60 | 60 | 131.06 | 192.09
    23 | "c" | 60 | 30 | 51.80 | 75.64
    24 | "m1" | 60 | 30 | 43.57 | 63.87
    25 | "e" | 60 | 60 | 70.74 | 102.44
    26 | "m2" | 30 | 60 | 46.28 | 66.61
    27 | "m2" | 60 | 60 | 57.15 | 82.40
    28 | "m2" | 60 | 30 | 32.82 | 47.40
end table
# Codificación:
table  # each column defines a variable
    N | Col
    1 | "A1"
    2 | "A2"
    3 | "A3"
    4 | "A4"
    5 | "A5"
    6 | "B6"
    7 | "C1"
    8 | "C2"
    9 | "C3"
    10 | "C4"
    11 | "C5"
    12 | "C6"
    13 | "D1"
    14 | "D2"
    15 | "D3"
    16 | "D4"
    17 | "D5"
    18 | "D6"
    19 | "E1"
    20 | "E2"
    21 | "E3"
    22 | "E4"
    23 | "E5"
    24 | "E6"
    25 | "G1"
    26 | "G2"
    27 | "G4"
    28 | "G5"
end table
table  # each column defines a variable
    □ | □ | □
    "A1" | "SERVICIO" | 49.00
    "A2" | "SERVICIO" | 60.13
    "A3" | "SERVICIO" | 71.12
    "A4" | "SERVICIO" | 41.76
    "A5" | "SERVICIO" | 32.81
    "B6" | "SERVICIO" | 25.02
    "C1" | "SERVICIO" | 101.96
    "C2" | "SERVICIO" | 131.12
    "C3" | "SERVICIO" | 139.34
    "C4" | "SERVICIO" | 137.11
    "C5" | "SERVICIO" | 63.71
    "C6" | "SERVICIO" | 32.87
    "D1" | "SERVICIO" | 97.42
    "D2" | "SERVICIO" | 95.21
    "D3" | "SERVICIO" | 224.65
    "D4" | "SERVICIO" | 225.40
    "D5" | "SERVICIO" | 140.52
    "D6" | "SERVICIO" | 60.83
    "E1" | "SERVICIO" | 105.78
    "E2" | "SERVICIO" | 96.21
    "E3" | "SERVICIO" | 72.19
    "E4" | "SERVICIO" | 131.06
    "E5" | "SERVICIO" | 51.80
    "E6" | "SERVICIO" | 43.57
    "G1" | "SERVICIO" | 70.74
    "G3" | "SERVICIO" | 46.28
    "G4" | "SERVICIO" | 57.15
    "G5" | "SERVICIO" | 32.82
end table
table  # each column defines a variable
    □ | □ | □
    "A1" | "1.4D+1.7L" | 70.65
    "A2" | "1.4D+1.7L" | 86.36
    "A3" | "1.4D+1.7L" | 102.04
    "A4" | "1.4D+1.7L" | 59.84
    "A5" | "1.4D+1.7L" | 47.44
    "B6" | "1.4D+1.7L" | 36.00
    "C1" | "1.4D+1.7L" | 148.14
    "C2" | "1.4D+1.7L" | 190.44
    "C3" | "1.4D+1.7L" | 201.96
    "C4" | "1.4D+1.7L" | 198.76
    "C5" | "1.4D+1.7L" | 92.23
    "C6" | "1.4D+1.7L" | 47.36
    "D1" | "1.4D+1.7L" | 141.52
    "D2" | "1.4D+1.7L" | 137.49
    "D3" | "1.4D+1.7L" | 326.34
    "D4" | "1.4D+1.7L" | 329.74
    "D5" | "1.4D+1.7L" | 206.79
    "D6" | "1.4D+1.7L" | 88.95
    "E1" | "1.4D+1.7L" | 153.77
    "E2" | "1.4D+1.7L" | 139.24
    "E3" | "1.4D+1.7L" | 103.84
    "E4" | "1.4D+1.7L" | 192.09
    "E5" | "1.4D+1.7L" | 75.64
    "E6" | "1.4D+1.7L" | 63.87
    "G1" | "1.4D+1.7L" | 102.44
    "G3" | "1.4D+1.7L" | 66.61
    "G4" | "1.4D+1.7L" | 82.40
    "G5" | "1.4D+1.7L" | 47.40
end table
# "e" | "m1"
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# "m2" | "c"
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# Distancias centro a centro de columna:
table  # each column defines a variable
    ID | Lx (m) | Ly (m)
    1 | 4.57 | 4.45
    2 | 5.15 | 6.85
    3 | 5.00 | 5.12
    4 | 4.75 | 5.32
    5 | 0 | 2.8
end table
# En caso de querer hacer todas céntricas aumentar 50 cm por lo menos
n_x1_c := a[4]/2 + 50 cm
n_x2_c := a[16]/2 + 50 cm
# Asumir Volados en X:
n_x1 := a[2]/2 = 0.3 m
n_x2 := a[25]/2 = 0.3 m
n_y1_c := b[13]/2 + 50 cm
n_y2_c := b[16]/2 + 50 cm
# Asumir Volados en Y:
n_y1 := b[1]/2 = 0.3 m
n_y2 := b[6]/2 = 0.15 m
# "e" | "m1" | "m2" | "c"
# [Excel component]
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# 1. DIMENSIONAMIENTO EN PLANTA
# DETERMINACION DE LA RESULTANTE
R := sum(P) = 2437.58 tonnef
2403.99 tonnef = 23575.1 kN
# DETERMINACION DEL CENTRO GEOMETRICO
R = 23904.5 kN
L := n_x1 + Lx[1] + Lx[2] + Lx[3] + Lx[4] + Lx[5] + n_x2
L = 2007 cm
x_G := L/2 = 1003.5 cm
B := n_y1 + Ly[1] + Ly[2] + Ly[3] + Ly[4] + Ly[5] + n_y2
B = 2499 cm
y_G := B/2 = 1249.5 cm
# UBICACION DE LA RESULTANTE
R*x_R == sum(P_i*x)
R*y_R == sum(P_i*y)
# Ver calculo de coordenadas
# COORDENADAS MEDIDAS DESDE EL PUNTO "0"
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x[1] := n_x1 = 0.3 m
y[1] := n_y1 = 0.3 m
x[2] := x[1] = 0.3 m
y[7] := y[1] = 0.3 m
x[3] := x[1] = 0.3 m
y[13] := y[1] = 0.3 m
x[4] := x[1] = 0.3 m
y[19] := y[1] = 0.3 m
x[5] := x[1] = 0.3 m
y[25] := y[1] = 0.3 m
x[6] := n_x1 + 2.27 m = 2.57 m
y[2] := n_y1 + Ly[1] = 4.75 m
x[7] := n_x1 + Lx[1] = 4.87 m
y[8] := y[2] = 4.75 m
x[8] := x[7] = 4.87 m
y[14] := y[2] = 4.75 m
x[9] := x[7] = 4.87 m
y[20] := y[2] = 4.75 m
x[10] := x[7] = 4.87 m
y[26] := y[2] = 4.75 m
x[11] := x[7] = 4.87 m
y[3] := n_y1 + Ly[1] + Ly[2] = 11.6 m
x[12] := x[7] = 4.87 m
y[9] := y[3] = 11.6 m
x[13] := n_x1 + Lx[1] + Lx[2] = 10.02 m
y[15] := y[3] = 11.6 m
x[14] := x[13] = 10.02 m
y[21] := y[3] = 11.6 m
x[15] := x[13] = 10.02 m
y[4] := n_y1 + Ly[1] + Ly[2] + Ly[3] = 16.72 m
x[16] := x[13] = 10.02 m
y[10] := y[4] = 16.72 m
x[17] := x[13] = 10.02 m
y[16] := y[4] = 16.72 m
x[18] := x[13] = 10.02 m
y[22] := y[4] = 16.72 m
x[19] := n_x1 + Lx[1] + Lx[2] + 4.0 m = 14.02 m
y[27] := y[4] = 16.72 m
x[20] := x[19] = 14.02 m
y[5] := n_y1 + Ly[1] + Ly[2] + Ly[3] + Ly[4] = 22.04 m
x[21] := n_x1 + Lx[1] + Lx[2] + Lx[3] = 15.02 m
y[11] := y[5] = 22.04 m
x[22] := x[21] = 15.02 m
y[17] := y[5] = 22.04 m
x[23] := x[21] = 15.02 m
y[23] := y[5] = 22.04 m
x[24] := x[19] = 14.02 m
y[28] := y[5] = 22.04 m
x[25] := n_x1 + Lx[1] + Lx[2] + Lx[3] + Lx[4] = 19.77 m
y[6] := n_y1 + Ly[1] + Ly[2] + Ly[3] + Ly[4] + Ly[5] = 24.84 m
x[26] := x[25] = 19.77 m
y[12] := y[6] = 24.84 m
x[27] := x[25] = 19.77 m
y[18] := y[6] = 24.84 m
x[28] := x[25] = 19.77 m
y[24] := y[6] = 24.84 m
Columna = [1; 2; 3; 4; 5; 6; 7; 8; 9; 10; 11; 12; 13; 14; 15; 16; 17; 18; 19; 20; 21; 22; 23; 24; 25; 26; 27; 28]
x = [0.3; 0.3; 0.3; 0.3; 0.3; 2.57; 4.87; 4.87; 4.87; 4.87; 4.87; 4.87; 10.02; 10.02; 10.02; 10.02; 10.02; 10.02; 14.02; 14.02; 15.02; 15.02; 15.02; 14.02; 19.77; 19.77; 19.77; 19.77] m
Columna' := [
    Columna[1];
    Columna[7];
    Columna[13];
    Columna[19];
    Columna[25];
    Columna[2];
    Columna[8];
    Columna[14];
    Columna[20];
    Columna[26];
    Columna[3];
    Columna[9];
    Columna[15];
    Columna[21];
    Columna[27];
    Columna[4];
    Columna[10];
    Columna[16];
    Columna[22];
    Columna[5];
    Columna[11];
    Columna[17];
    Columna[23];
    Columna[28];
    Columna[6];
    Columna[12];
    Columna[18];
    Columna[24]
] = [1; 7; 13; 19; 25; 2; 8; 14; 20; 26; 3; 9; 15; 21; 27; 4; 10; 16; 22; 5; 11; 17; 23; 28; 6; 12; 18; 24]
y' := [
    y[1];
    y[7];
    y[13];
    y[19];
    y[25];
    y[2];
    y[8];
    y[14];
    y[20];
    y[26];
    y[3];
    y[9];
    y[15];
    y[21];
    y[27];
    y[4];
    y[10];
    y[16];
    y[22];
    y[5];
    y[11];
    y[17];
    y[23];
    y[28];
    y[6];
    y[12];
    y[18];
    y[24]
]
# COORDENADAS MEDIDAS DESDE EL PUNTO "0"
# [Excel component]
    excel["A3"] := Columna
    excel["B3"] := x/cm
    excel["C3"] := P/tonnef
    Sx := excel["D18:D18"]*tonnef*cm
P*x = 2291548 tonnef*cm
x_R := P*x/R = 940.091 cm
y' = [0.3; 0.3; 0.3; 0.3; 0.3; 4.75; 4.75; 4.75; 4.75; 4.75; 11.6; 11.6; 11.6; 11.6; 16.72; 16.72; 16.72; 16.72; 16.72; 22.04; 22.04; 22.04; 22.04; 22.04; 24.84; 24.84; 24.84; 24.84] m
Columna' = [1; 7; 13; 19; 25; 2; 8; 14; 20; 26; 3; 9; 15; 21; 27; 4; 10; 16; 22; 5; 11; 17; 23; 28; 6; 12; 18; 24]
P' := [
    P[1];
    P[7];
    P[13];
    P[19];
    P[25];
    P[2];
    P[8];
    P[14];
    P[20];
    P[26];
    P[3];
    P[9];
    P[15];
    P[21];
    P[27];
    P[4];
    P[10];
    P[16];
    P[22];
    P[5];
    P[11];
    P[17];
    P[23];
    P[28];
    P[6];
    P[12];
    P[18];
    P[24]
]
P_u' := [
    P_u[1];
    P_u[7];
    P_u[13];
    P_u[19];
    P_u[25];
    P_u[2];
    P_u[8];
    P_u[14];
    P_u[20];
    P_u[26];
    P_u[3];
    P_u[9];
    P_u[15];
    P_u[21];
    P_u[27];
    P_u[4];
    P_u[10];
    P_u[16];
    P_u[22];
    P_u[5];
    P_u[11];
    P_u[17];
    P_u[23];
    P_u[28];
    P_u[6];
    P_u[12];
    P_u[18];
    P_u[24]
]
# COORDENADAS MEDIDAS DESDE EL PUNTO "0"
# [Excel component]
    excel["A3"] := Columna'
    excel["B3"] := y'/cm
    excel["C3"] := P'/tonnef
    Sx := excel["D18:D18"]*tonnef*cm
P*y = 2907660 tonnef*cm
y_R := P*y/R = 1192.85 cm
# CONDICION DE VOLTEO
x_R = 940.091 cm
x_G = 1003.5 cm
L/6 = 334.5 cm
e_x := |x_R - x_G|
e_x = 63.4087 cm
Verificacion_1 := if(|e_x| ≤ L/6, "Cumple", "No cumple") = "Cumple"
y_R = 1192.85 cm
y_G = 1249.5 cm
B/6 = 416.5 cm
e_y := |y_R - y_G|
e_y = 56.6531 cm
Verificacion_2 := if(|e_y| ≤ B/6, "Cumple", "No cumple") = "Cumple"
# UBICACION DE LA RESULTANTE MEDIDA DESDE EL CENTROIDE
# Coordenadas  Zapata
#
# datos(L, B) := [0, 0; L, 0; L, B; 0, B; 0, 0]
# Coordenadas Columna 4
#
# datos_4 := [ x[4] - a[4]/2, y[4] - b[4]/2; x[4] + a[4]/2, y[4] - b[4]/2; x[4] + a[4]/2, y[4] + b[4]/2; x[4] - a[4]/2, y[4] + b[4]/2; x[4] - a[4]/2, y[4] - b[4]/2 ]
# Coordenadas Columna 1
#
# datos_1 := [ x[1] - a[1]/2, y[1] - b[1]/2; x[1] + a[1]/2, y[1] - b[1]/2; x[1] + a[1]/2, y[1] + b[1]/2; x[1] - a[1]/2, y[1] + b[1]/2; x[1] - a[1]/2, y[1] - b[1]/2 ]
# Coordenadas Columna 2
#
# datos_2 := [ x[2] - a[2]/2, y[2] - b[2]/2; x[2] + a[2]/2, y[2] - b[2]/2; x[2] + a[2]/2, y[2] + b[2]/2; x[2] - a[2]/2, y[2] + b[2]/2; x[2] - a[2]/2, y[2] - b[2]/2 ]
# Coordenadas Columna 3
#
# datos_3 := [ x[3] - a[3]/2, y[3] - b[3]/2; x[3] + a[3]/2, y[3] - b[3]/2; x[3] + a[3]/2, y[3] + b[3]/2; x[3] - a[3]/2, y[3] + b[3]/2; x[3] - a[3]/2, y[3] - b[3]/2 ]
# Coordenadas Columna 17
#
# datos_17 := [ x[17] - a[17]/2, y[17] - b[17]/2; x[17] + a[17]/2, y[17] - b[17]/2; x[17] + a[17]/2, y[17] + b[17]/2; x[17] - a[17]/2, y[17] + b[17]/2; x[17] - a[17]/2, y[17] - b[17]/2 ]
# Coordenadas Columna 21
#
# datos_21 := [ x[21] - a[21]/2, y[21] - b[21]/2; x[21] + a[21]/2, y[21] - b[21]/2; x[21] + a[21]/2, y[21] + b[21]/2; x[21] - a[21]/2, y[21] + b[21]/2; x[21] - a[21]/2, y[21] - b[21]/2 ]
# Coordenadas Columna 25
#
# datos_25 := [ x[25] - a[25]/2, y[25] - b[25]/2; x[25] + a[25]/2, y[25] - b[25]/2; x[25] + a[25]/2, y[25] + b[25]/2; x[25] - a[25]/2, y[25] + b[25]/2; x[25] - a[25]/2, y[25] - b[25]/2 ]
# Coordenadas Columna 8
#
# datos_8 := [ x[8] - a[8]/2, y[8] - b[8]/2; x[8] + a[8]/2, y[8] - b[8]/2; x[8] + a[8]/2, y[8] + b[8]/2; x[8] - a[8]/2, y[8] + b[8]/2; x[8] - a[8]/2, y[8] - b[8]/2 ]
# Coordenadas Columna 5
#
# datos_5 := [ x[5] - a[5]/2, y[5] - b[5]/2; x[5] + a[5]/2, y[5] - b[5]/2; x[5] + a[5]/2, y[5] + b[5]/2; x[5] - a[5]/2, y[5] + b[5]/2; x[5] - a[5]/2, y[5] - b[5]/2 ]
# Coordenadas Columna 6
#
# datos_6 := [ x[6] - a[6]/2, y[6] - b[6]/2; x[6] + a[6]/2, y[6] - b[6]/2; x[6] + a[6]/2, y[6] + b[6]/2; x[6] - a[6]/2, y[6] + b[6]/2; x[6] - a[6]/2, y[6] - b[6]/2 ]
# Coordenadas Columna 7
#
# datos_7 := [ x[7] - a[7]/2, y[7] - b[7]/2; x[7] + a[7]/2, y[7] - b[7]/2; x[7] + a[7]/2, y[7] + b[7]/2; x[7] - a[7]/2, y[7] + b[7]/2; x[7] - a[7]/2, y[7] - b[7]/2 ]
# Coordenadas Columna 18
#
# datos_18 := [ x[18] - a[18]/2, y[18] - b[18]/2; x[18] + a[18]/2, y[18] - b[18]/2; x[18] + a[18]/2, y[18] + b[18]/2; x[18] - a[18]/2, y[18] + b[18]/2; x[18] - a[18]/2, y[18] - b[18]/2 ]
# Coordenadas Columna 22
#
# datos_22 := [ x[22] - a[22]/2, y[22] - b[22]/2; x[22] + a[22]/2, y[22] - b[22]/2; x[22] + a[22]/2, y[22] + b[22]/2; x[22] - a[22]/2, y[22] + b[22]/2; x[22] - a[22]/2, y[22] - b[22]/2 ]
# Coordenadas Columna 26
#
# datos_26 := [ x[26] - a[26]/2, y[26] - b[26]/2; x[26] + a[26]/2, y[26] - b[26]/2; x[26] + a[26]/2, y[26] + b[26]/2; x[26] - a[26]/2, y[26] + b[26]/2; x[26] - a[26]/2, y[26] - b[26]/2 ]
# Coordenadas Columna 9
#
# datos_9 := [ x[9] - a[9]/2, y[9] - b[9]/2; x[9] + a[9]/2, y[9] - b[9]/2; x[9] + a[9]/2, y[9] + b[9]/2; x[9] - a[9]/2, y[9] + b[9]/2; x[9] - a[9]/2, y[9] - b[9]/2 ]
# Coordenadas Columna 10
#
# datos_10 := [ x[10] - a[10]/2, y[10] - b[10]/2; x[10] + a[10]/2, y[10] - b[10]/2; x[10] + a[10]/2, y[10] + b[10]/2; x[10] - a[10]/2, y[10] + b[10]/2; x[10] - a[10]/2, y[10] - b[10]/2 ]
# Coordenadas Columna 11
#
# datos_11 := [ x[11] - a[11]/2, y[11] - b[11]/2; x[11] + a[11]/2, y[11] - b[11]/2; x[11] + a[11]/2, y[11] + b[11]/2; x[11] - a[11]/2, y[11] + b[11]/2; x[11] - a[11]/2, y[11] - b[11]/2 ]
# Coordenadas Columna 12
#
# datos_12 := [ x[12] - a[12]/2, y[12] - b[12]/2; x[12] + a[12]/2, y[12] - b[12]/2; x[12] + a[12]/2, y[12] + b[12]/2; x[12] - a[12]/2, y[12] + b[12]/2; x[12] - a[12]/2, y[12] - b[12]/2 ]
# Coordenadas Columna 19
#
# datos_19 := [ x[19] - a[19]/2, y[19] - b[19]/2; x[19] + a[19]/2, y[19] - b[19]/2; x[19] + a[19]/2, y[19] + b[19]/2; x[19] - a[19]/2, y[19] + b[19]/2; x[19] - a[19]/2, y[19] - b[19]/2 ]
# Coordenadas Columna 23
#
# datos_23 := [ x[23] - a[23]/2, y[23] - b[23]/2; x[23] + a[23]/2, y[23] - b[23]/2; x[23] + a[23]/2, y[23] + b[23]/2; x[23] - a[23]/2, y[23] + b[23]/2; x[23] - a[23]/2, y[23] - b[23]/2 ]
# Coordenadas Columna 27
#
# datos_27 := [ x[27] - a[27]/2, y[27] - b[27]/2; x[27] + a[27]/2, y[27] - b[27]/2; x[27] + a[27]/2, y[27] + b[27]/2; x[27] - a[27]/2, y[27] + b[27]/2; x[27] - a[27]/2, y[27] - b[27]/2 ]
# Coordenadas Columna 13
#
# datos_13 := [ x[13] - a[13]/2, y[13] - b[13]/2; x[13] + a[13]/2, y[13] - b[13]/2; x[13] + a[13]/2, y[13] + b[13]/2; x[13] - a[13]/2, y[13] + b[13]/2; x[13] - a[13]/2, y[13] - b[13]/2 ]
# Coordenadas Columna 14
#
# datos_14 := [ x[14] - a[14]/2, y[14] - b[14]/2; x[14] + a[14]/2, y[14] - b[14]/2; x[14] + a[14]/2, y[14] + b[14]/2; x[14] - a[14]/2, y[14] + b[14]/2; x[14] - a[14]/2, y[14] - b[14]/2 ]
# Coordenadas Columna 15
#
# datos_15 := [ x[15] - a[15]/2, y[15] - b[15]/2; x[15] + a[15]/2, y[15] - b[15]/2; x[15] + a[15]/2, y[15] + b[15]/2; x[15] - a[15]/2, y[15] + b[15]/2; x[15] - a[15]/2, y[15] - b[15]/2 ]
# Coordenadas Columna 16
#
# datos_16 := [ x[16] - a[16]/2, y[16] - b[16]/2; x[16] + a[16]/2, y[16] - b[16]/2; x[16] + a[16]/2, y[16] + b[16]/2; x[16] - a[16]/2, y[16] + b[16]/2; x[16] - a[16]/2, y[16] - b[16]/2 ]
# Coordenadas Columna 20
#
# datos_20 := [ x[20] - a[20]/2, y[20] - b[20]/2; x[20] + a[20]/2, y[20] - b[20]/2; x[20] + a[20]/2, y[20] + b[20]/2; x[20] - a[20]/2, y[20] + b[20]/2; x[20] - a[20]/2, y[20] - b[20]/2 ]
# Coordenadas Columna 24
#
# datos_24 := [ x[24] - a[24]/2, y[24] - b[24]/2; x[24] + a[24]/2, y[24] - b[24]/2; x[24] + a[24]/2, y[24] + b[24]/2; x[24] - a[24]/2, y[24] + b[24]/2; x[24] - a[24]/2, y[24] - b[24]/2 ]
# Coordenadas Columna 28
#
# datos_28 := [ x[28] - a[28]/2, y[28] - b[28]/2; x[28] + a[28]/2, y[28] - b[28]/2; x[28] + a[28]/2, y[28] + b[28]/2; x[28] - a[28]/2, y[28] + b[28]/2; x[28] - a[28]/2, y[28] - b[28]/2 ]
# [chart]
    X[1] := datos(L, B)[:, 1]
    Y[1] := datos(L, B)[:, 2]
    X[3] := datos_2[:, 1]
    X[4] := datos_3[:, 1]
    X[5] := datos_4[:, 1]
    X[6] := datos_5[:, 1]
    X[7] := datos_6[:, 1]
    X[2] := datos_1[:, 1]
    Y[2] := datos_1[:, 2]
    Y[3] := datos_2[:, 2]
    Y[4] := datos_3[:, 2]
    Y[5] := datos_4[:, 2]
    Y[6] := datos_5[:, 2]
    Y[7] := datos_6[:, 2]
    X[8] := datos_7[:, 1]
    X[9] := datos_8[:, 1]
    X[10] := datos_9[:, 1]
    X[11] := datos_10[:, 1]
    X[12] := datos_11[:, 1]
    X[13] := datos_12[:, 1]
    Y[8] := datos_7[:, 2]
    Y[9] := datos_8[:, 2]
    Y[10] := datos_9[:, 2]
    Y[11] := datos_10[:, 2]
    Y[12] := datos_11[:, 2]
    Y[13] := datos_12[:, 2]
    X[14] := datos_13[:, 1]
    X[15] := datos_14[:, 1]
    X[16] := datos_15[:, 1]
    X[17] := datos_16[:, 1]
    X[18] := datos_17[:, 1]
    X[19] := datos_18[:, 1]
    Y[14] := datos_13[:, 2]
    Y[15] := datos_14[:, 2]
    Y[16] := datos_15[:, 2]
    Y[17] := datos_16[:, 2]
    Y[18] := datos_17[:, 2]
    Y[19] := datos_18[:, 2]
    X[20] := datos_19[:, 1]
    X[21] := datos_20[:, 1]
    X[22] := datos_21[:, 1]
    X[23] := datos_22[:, 1]
    X[24] := datos_23[:, 1]
    X[25] := datos_24[:, 1]
    Y[20] := datos_19[:, 2]
    Y[21] := datos_20[:, 2]
    Y[22] := datos_21[:, 2]
    Y[23] := datos_22[:, 2]
    Y[24] := datos_23[:, 2]
    Y[25] := datos_24[:, 2]
    X[26] := datos_25[:, 1]
    X[27] := datos_26[:, 1]
    X[28] := datos_27[:, 1]
    X[29] := datos_28[:, 1]
    Y[26] := datos_25[:, 2]
    Y[27] := datos_26[:, 2]
    Y[28] := datos_27[:, 2]
    Y[29] := datos_28[:, 2]
    Xmin := 0
    Ymin := 0
    Xmax := L*1/m
    Ymax := B*1/m
e_x := x_R - x_G = -63.4087 cm
e_y := y_R - y_G = -56.6531 cm
# Coordenadas  Zapata
#
# datos(L, B) := [-L/2, -B/2; L/2, -B/2; L/2, B/2; -L/2, B/2; -L/2, -B/2]
# Coordenadas Núcleo  central
#
# datos_3(L, B) := [0, -B/6; L/6, 0; 0, B/6; -L/6, 0; 0, -B/6]
f(x_i) := B*x_i/L - B/6
x_i := 0, 0 + L/120 .. L/6
f(x_i) = [-4.165; -3.95675; -3.7485; -3.54025; -3.332; -3.12375; -2.9155; -2.70725; -2.499; -2.29075; -2.0825; -1.87425; -1.666; -1.45775; -1.2495; -1.04125; -0.833; -0.62475; -0.4165; -0.20825; 0] m
f2(x_2i) := B*(L/6 + x_2i)/L
x_2i := -L/6, -L/6 + L/120 .. 0
f2(x_2i) = [0; 0.20825; 0.4165; 0.62475; 0.833; 1.04125; 1.2495; 1.45775; 1.666; 1.87425; 2.0825; 2.29075; 2.499; 2.70725; 2.9155; 3.12375; 3.332; 3.54025; 3.7485; 3.95675; 4.165] m
# Coordenadas Resultante
#
# datos_4(L, B) := [e_x, e_y]
# [chart]
    X[1] := datos(L, B)[:, 1]
    Y[1] := datos(L, B)[:, 2]
    X[2] := datos_3(L, B)[:, 1]
    Y[2] := datos_3(L, B)[:, 2]
    X[3] := x_i
    Y[3] := f(x_i)
    X[4] := x_i
    Y[4] := -f(x_i)
    X[5] := x_2i
    Y[5] := f2(x_2i)
    X[6] := x_2i
    Y[6] := -f2(x_2i)
    X[7] := datos_4(L, B)[:, 1]
    X[8] := [-L/2; L/2]
    Y[8] := [0; 0]
    Y[7] := datos_4(L, B)[:, 2]
    Xmin := -L/2*1/m
    X[9] := [0; 0]
    Y[9] := [-B/2; B/2]
    Ymin := -B/2*1/m
    Xmax := L/2*1/m
    Ymax := B/2*1/m
# TENSIONES EN EL TERRENO EN ESTADO DE SERVICIO
# COORDENADAS MEDIDAS DESDE EL CENTROIDE
x_C := x - x_G
y_C := y - y_G
σ(x_C, y_C) := R/(B*L)*(1 + 12*y_C*e_y/B^2 + 12*x_C*e_x/L^2) + γ_c*H*1 m*1 m/(100 cm*100 cm)
# [Excel component]
    excel["A3"] := Columna
    excel["B3"] := x_C/cm
    excel["C3"] := y_C/cm
    excel["D3"] := round(σ(x_C, y_C)/(kgf/cm^2), 3)
    excel["E3"] := q_adm/(kgf/cm^2)
σ(x_C, y_C) = [0.879906; 0.856362; 0.82012; 0.793032; 0.764885; 0.72923; 0.83795; 0.814406; 0.778164; 0.751075; 0.722929; 0.708115; 0.790668; 0.767125; 0.730883; 0.703794; 0.675648; 0.660833; 0.753945; 0.730401; 0.684979; 0.65789; 0.629744; 0.62411; 0.701156; 0.677612; 0.614282; 0.586135] kgf/cm^2
q_adm = 1.3 kgf/cm^2
Ver := σ(x_C, y_C) ≤ q_adm = [1; 1; 1; 1; 1; 1; 1; 1; 1; 1; 1; 1; 1; 1; 1; 1; 1; 1; 1; 1; 1; 1; 1; 1; 1; 1; 1; 1]
σ_max := R/(L*B)*(1 + 6*|e_x|/L + 6*|e_y|/B) + γ_c*H*1 m*1 m/(100 cm*100 cm) = 0.884247 kgf/cm^2
Verificación_3 := if(Ver == [1; 1; 1; 1; 1; 1; 1; 1; 1; 1; 1; 1; 1; 1; 1; 1; 1; 1; 1; 1; 1; 1; 1; 1; 1; 1; 1; 1] and σ_max ≤ q_adm, "Cumple", "Cambiar Dimensiones") = "Cumple"
# TENSION EN EL TERRENO EN ESTADO ULTIMO
R_u := sum(P_u) = 3539.35 tonnef
x_Ru := P_u*x/R_u = 9.41083 m
y_Ru := P_u*y/R_u = 11.948 m
e_ux := |x_Ru - x_G|
e_uy := |y_Ru - y_G|
e_ux = 62.4167 cm
e_uy = 54.701 cm
σ_u := R_u/(L*B)*(1 + 6*|e_ux|/L + 6*|e_uy|/B) + 1.2*γ_c*H*1 m*1 m/(100 cm*100 cm) = 1.21804 kgf/cm^2
# 2. DIMENSIONAMIENTO EN ELEVACION
# MATRIZ DE FILTRADO DE DATOS POR ID
[e; m1; m2; c] :=
    i ← 1
    p ← 1
    q ← 1
    r ← 1
    s ← 1
    f1 ← ["Columna", "a(cm)", "b(cm)", "Pu(tonnef)"]
    for i ∈ 1, 2 .. rows(id)
        if id[i] == "e"
            Columna_e[p] ← i
            a_e[p] ← a[i]/cm
            b_e[p] ← b[i]/cm
            P_u_e[p] ← P_u[i]/tonnef
            p ← p + 1
            e ← stack(f1, augment(Columna_e, a_e, b_e, P_u_e))
        else if id[i] == "m1"
            Columna_m1[q] ← i
            a_m1[q] ← a[i]/cm
            b_m1[q] ← b[i]/cm
            P_u_m1[q] ← P_u[i]/tonnef
            q ← q + 1
            m1 ← stack(f1, augment(Columna_m1, a_m1, b_m1, P_u_m1))
        else if id[i] == "m2"
            Columna_m2[r] ← i
            a_m2[r] ← a[i]/cm
            b_m2[r] ← b[i]/cm
            P_u_m2[r] ← P_u[i]/tonnef
            r ← r + 1
            m2 ← stack(f1, augment(Columna_m2, a_m2, b_m2, P_u_m2))
        else if id[i] == "c"
            Columna_c[s] ← i
            a_c[s] ← a[i]/cm
            b_c[s] ← b[i]/cm
            P_u_c[s] ← P_u[i]/tonnef
            s ← s + 1
            c ← stack(f1, augment(Columna_c, a_c, b_c, P_u_c))
    Mat_0 ← [0, 1, 1, 1]
    e ← e
    if e == 0
        e ← stack(f1, Mat_0)
    else
        e ← e
    m1 ← m1
    if m1 == 0
        m1 ← stack(f1, Mat_0)
    else
        m1 ← m1
    m2 ← m2
    if m2 == 0
        m2 ← stack(f1, Mat_0)
    else
        m1 ← m1
    c ← c
    if c == 0
        c ← stack(f1, Mat_0)
    else
        c ← c
    [e; m1; m2; c]
    = [
        ["Columna", "a(cm)", "b(cm)", "Pu(tonnef)"; 1, 60, 60, 70.65; 25, 60, 60, 102.44];
        [
            "Columna", "a(cm)", "b(cm)", "Pu(tonnef)";
            6, 60, 30, 36;
            7, 60, 60, 148.14;
            12, 60, 30, 47.36;
            13, 60, 60, 141.52;
            18, 60, 30, 88.95;
            19, 60, 60, 153.77;
            24, 60, 30, 63.87
        ];
        [
            "Columna", "a(cm)", "b(cm)", "Pu(tonnef)";
            2, 60, 60, 86.36;
            3, 60, 60, 102.04;
            4, 30, 60, 59.84;
            5, 60, 30, 47.44;
            26, 30, 60, 66.61;
            27, 60, 60, 82.4;
            28, 60, 30, 47.4
        ];
        [
            "Columna", "a(cm)", "b(cm)", "Pu(tonnef)";
            8, 60, 60, 190.44;
            9, 60, 60, 201.96;
            10, 60, 60, 198.76;
            11, 60, 30, 92.23;
            14, 60, 60, 137.49;
            15, 60, 60, 326.34;
            16, 60, 60, 329.74;
            17, 60, 30, 206.79;
            20, 60, 60, 139.24;
            21, 60, 60, 103.84;
            22, 60, 60, 192.09;
            23, 60, 30, 75.64
        ]
    ]
# DATOS COLUMNAS DE ESQUINA "e" | DATOS COLUMNAS DE BORDE "m1" | DATOS COLUMNAS DE BORDE "m2" | DATOS COLUMNAS CENTRICAS "c"
e = ["Columna", "a(cm)", "b(cm)", "Pu(tonnef)"; 1, 60, 60, 70.65; 25, 60, 60, 102.44]
m1 = [
    "Columna", "a(cm)", "b(cm)", "Pu(tonnef)";
    6, 60, 30, 36;
    7, 60, 60, 148.14;
    12, 60, 30, 47.36;
    13, 60, 60, 141.52;
    18, 60, 30, 88.95;
    19, 60, 60, 153.77;
    24, 60, 30, 63.87
]
m2 = [
    "Columna", "a(cm)", "b(cm)", "Pu(tonnef)";
    2, 60, 60, 86.36;
    3, 60, 60, 102.04;
    4, 30, 60, 59.84;
    5, 60, 30, 47.44;
    26, 30, 60, 66.61;
    27, 60, 60, 82.4;
    28, 60, 30, 47.4
]
c = [
    "Columna", "a(cm)", "b(cm)", "Pu(tonnef)";
    8, 60, 60, 190.44;
    9, 60, 60, 201.96;
    10, 60, 60, 198.76;
    11, 60, 30, 92.23;
    14, 60, 60, 137.49;
    15, 60, 60, 326.34;
    16, 60, 60, 329.74;
    17, 60, 30, 206.79;
    20, 60, 60, 139.24;
    21, 60, 60, 103.84;
    22, 60, 60, 192.09;
    23, 60, 30, 75.64
]
# CORTE POR PUNZONAMIENTO
# Tabla 21.2.1 ACI 318-19
ϕ_v := 0.75
# 22.6.5.2(a)ACI 318-19
v_C == ϕ_v*4*λ_s*λ*sqrt(f'c*psi)
λ := 1  # (Hormigón de Peso Normal)
λ_s := 1  # 13.2.6.2 ACI 318-19
# 2.1 COLUMNA CRITICA DE ESQUINA "e"
# DATOS COLUMNAS DE ESQUINA "e"
# Carga critica de esquina:
P_u_e := 83.81 tonnef
# Dimensiones de la columna:
e = ["Columna", "a(cm)", "b(cm)", "Pu(tonnef)"; 1, 60, 60, 70.65; 25, 60, 60, 102.44]
# Dimensión en x:
a.e := 60 cm
# Dimensión en y:
b.e := 60 cm
v_u == (P_u_e - σ_u*A_cr_e(d))/(B_cr_e(d)*d) + γ_vx*|P_u_e*(d/2)|/J_cx∥c(d) + γ_vy*(P_u_e*(d/2))/J_cy∥c(d)
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# Área critica:
A_cr_e(d) := (a.e + d/2)*(b.e + d/2)
# Perímetro critico:
B_cr_e(d) := d + a.e + b.e
γ_vx := 1 - 1/(1 + 2/3*sqrt(b.e/a.e)) = 0.4
γ_vy := 1 - 1/(1 + 2/3*sqrt(a.e/b.e)) = 0.4
(P_u_e - σ_u*A_cr_e(d))/(B_cr_e(d)*d) + γ_vx*(P_u_e*(d/2))/J_cx∥c(d) + γ_vy*(P_u_e*(d/2))/J_cy∥c(d) ≤ ϕ_v*4*λ_s*λ*sqrt(f'c*psi)
# Notas del PCA
# ACI 318-08 Pag.957
J_cx∥c(d) := ((b.e + d/2)^2*d*(b.e + d/2 + 4*(a.e + d/2)) + d^3*(b.e + d/2 + a.e + d/2))/(6*(b.e + d/2))
# Notas del PCA
# ACI 318-08 Pag.957
J_cy∥c(d) := ((a.e + d/2)^2*d*(a.e + d/2 + 4*(b.e + d/2)) + d^3*(a.e + d/2 + b.e + d/2))/(6*(a.e + d/2))
(P_u_e - σ_u*A_cr_e(d))/(B_cr_e(d)*d) + γ_vx*(P_u_e*(d/2))/J_cx∥c(d) + γ_vy*(P_u_e*(d/2))/J_cy∥c(d) - ϕ_v*4*λ_s*λ*sqrt(f'c*psi) == 0
(P_u_e - σ_u*(a.e + d/2)*(b.e + d/2))/((d + a.e + b.e)*d) + γ_vx*(P_u_e*(d/2))/(((b.e + d/2)^2*d*(b.e + d/2 + 4*(a.e + d/2)) + d^3*(b.e + d/2 + a.e + d/2))/(6*(b.e + d/2))) + γ_vy*(P_u_e*(d/2))/(((a.e + d/2)^2*d*(a.e + d/2 + 4*(b.e + d/2)) + d^3*(a.e + d/2 + b.e + d/2))/(6*(a.e + d/2))) - ϕ_v*4*λ_s*λ*sqrt(f'c*psi) == 0
mayorador :=
    if a.e == b.e
        mayorador ← 1
    else
        mayorador ← 1
P_u_e' := P_u_e*1/lbf = 184769
a_e' := a.e*1/in*mayorador = 23.622
f'c' := f'c/(lbf/in^2) = 3982.54
b_e' := b.e*1/in = 23.622
σ_u' := σ_u/(lbf/in^2) = 17.3246
γ_vx = 0.4
ϕ_v = 0.75
γ_vy = 0.4
λ_s = 1
λ = 1
d' := (P_u_e' - σ_u'*(a_e' + d'/2)*(b_e' + d'/2))/((d' + a_e' + b_e')*d') + γ_vx*P_u_e'*(d'/2)/(((b_e' + d'/2)^2*d'*(b_e' + d'/2 + 4*(a_e' + d'/2)) + d'^3*(b_e' + d'/2 + a_e' + d'/2))/(6*(b_e' + d'/2))) + γ_vy*P_u_e'*(d'/2)/(((a_e' + d'/2)^2*d'*(a_e' + d'/2 + 4*(b_e' + d'/2)) + d'^3*(a_e' + d'/2 + b_e' + d'/2))/(6*(a_e' + d'/2))) - ϕ_v*4*sqrt(2/(1 + d'/10))*λ*sqrt(f'c') solve, d' → 25.7389136315
solve block
    # guess values
    d := 15 cm
    # constraints
    (P_u_e - σ_u*(a.e + d/2)*(b.e + d/2))/(B_cr_e(d)*d) + γ_vx*(P_u_e*(d/2))/J_cx∥c(d) + γ_vy*(P_u_e*(d/2))/J_cy∥c(d) == ϕ_v*4*sqrt(2/(1 + d/(10*in)))*λ*sqrt(f'c*psi)
    # solver
    d := find(d) = 65.3768 cm
end solve block
d' = 25.7389
d' := Re(d') = 25.7389
d' := max(d')*in = 25.7389 in
d_e := d' = 65.3768 cm
d_e = 65.3768 cm
# 2.2 COLUMNA CRITICA DE BORDE "m1" | DATOS COLUMNAS DE BORDE "m1"
# Carga critica de borde:
P_u_m1 := 153.77 tonnef
# Dimensión en x:
a.m1 := 60 cm
m1 = [
    "Columna", "a(cm)", "b(cm)", "Pu(tonnef)";
    6, 60, 30, 36;
    7, 60, 60, 148.14;
    12, 60, 30, 47.36;
    13, 60, 60, 141.52;
    18, 60, 30, 88.95;
    19, 60, 60, 153.77;
    24, 60, 30, 63.87
]
# Dimensión en y:
b.m1 := 60 cm
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v_u == (P_u_m1 - σ_u*A_cr_m1(d))/(B_cr_m1(d)*d) + γ_vx(d)*(P_u_m1*(d/2))/J_cx∥c'(d)
# Área critica:
A_cr_m1(d) := (a.m1 + d)*(b.m1 + d/2)
# Perímetro critico:
B_cr_m1(d) := 2*d + a.m1 + 2*b.m1
γ_vx(d) := 1 - 1/(1 + 2/3*sqrt((b.m1 + d/2)/(a.m1 + d)))
(P_u_m1 - σ_u*A_cr_m1(d))/(B_cr_m1(d)*d) + γ_vx(d)*(P_u_m1*(d/2))/J_cx∥c'(d) ≤ ϕ_v*4*λ_s*λ*sqrt(f'c*psi)
# Notas del PCA
# ACI 318-08 Pag.957
J_cx∥c'(d) := (2*(b.m1 + d/2)^2*d*(b.m1 + d/2 + 2*(a.m1 + d)) + d^3*(2*(b.m1 + d/2) + a.m1 + d))/(6*(b.m1 + d/2 + a.m1 + d))
(P_u_m1 - σ_u*A_cr_m1(d))/(B_cr_m1(d)*d) + γ_vx(d)*(P_u_m1*(d/2))/J_cx∥c'(d) - ϕ_v*4*λ_s*λ*sqrt(f'c*psi) == 0
(P_u_m1 - σ_u*(a.m1 + d)*(b.m1 + d/2))/((2*d + a.m1 + 2*b.m1)*d) + (1 - 1/(1 + 2/3*sqrt((b.m1 + d/2)/(a.m1 + d))))*(P_u_m1*(d/2))/((2*(b.m1 + d/2)^2*d*(b.m1 + d/2 + 2*(a.m1 + d)) + d^3*(2*(b.m1 + d/2) + a.m1 + d))/(6*(b.m1 + d/2 + a.m1 + d))) - ϕ_v*4*λ_s*λ*sqrt(f'c*psi) == 0
mayorador :=
    if a.m1 == b.m1
        mayorador ← 1
    else
        mayorador ← 1
P_u_m1' := P_u_m1*1/lbf = 339005
a_m1' := a.m1*1/in*mayorador = 23.622
b_m1' := b.m1*1/in = 23.622
σ_u' := σ_u/(lbf/in^2) = 17.3246
f'c' := f'c/(lbf/in^2) = 3982.54
ϕ_v = 0.75
λ_s = 1
λ = 1
d_m1 := (P_u_m1' - σ_u'*(a_m1' + d_m1)*(b_m1' + d_m1/2))/((2*d_m1 + a_m1' + 2*b_m1')*d_m1) + (1 - 1/(1 + 2/3*sqrt((b_m1' + b_m1'/2)/(a_m1' + b_m1'))))*(P_u_m1'*(d_m1/2))/((2*(b_m1' + d_m1/2)^2*d_m1*(b_m1' + d_m1/2 + 2*(a_m1' + d_m1)) + d_m1^3*(2*(b_m1' + d_m1/2) + a_m1' + d_m1))/(6*(b_m1' + d_m1/2 + a_m1' + d_m1))) - ϕ_v*4*sqrt(2/(1 + d_m1/10))*λ*sqrt(f'c') solve, d_m1 → [-13.5177478312 - 11.9091828575i; -13.5177478312 + 11.9091828575i; 31.2555174602]
solve block
    # guess values
    d := 15 cm
    # constraints
    (P_u_m1 - σ_u*A_cr_m1(d))/(B_cr_m1(d)*d) + (1 - 1/(1 + 2/3*sqrt((b.m1 + b.m1/2)/(a.m1 + b.m1))))*(P_u_m1*(d/2))/J_cx∥c'(d) == ϕ_v*4*sqrt(2/(1 + d/(10*in)))*λ*sqrt(f'c*psi)
    # solver
    d := find(d) = 79.389 cm
end solve block
d_m1 = [-13.5177 - 11.9092i; -13.5177 + 11.9092i; 31.2555]
d_m1 := Re(d_m1) = [-13.5177; -13.5177; 31.2555]
d_m1 := max(d_m1)*in = 31.2555 in
d_m1 = 79.389 cm
d_m1 = 79.389 cm
# DATOS COLUMNAS DE BORDE "m2"
# 2.3 COLUMNA CRITICA DE BORDE m2
# Carga critica de borde:
P_u_m2 := 99.55 tonnef
# Dimensión en x:
a.m2 := 60 cm
m2 = [
    "Columna", "a(cm)", "b(cm)", "Pu(tonnef)";
    2, 60, 60, 86.36;
    3, 60, 60, 102.04;
    4, 30, 60, 59.84;
    5, 60, 30, 47.44;
    26, 30, 60, 66.61;
    27, 60, 60, 82.4;
    28, 60, 30, 47.4
]
# Dimensión en y:
b.m2 := 60 cm
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v_u == (P_u_m2 - σ_u*A_cr_m2(d))/(B_cr_m2(d)*d) + γ_vy(d)*(P_u_m2*(d/2))/J_cy∥c'(d)
# Área critica:
A_cr_m2(d) := (a.m2 + d/2)*(b.m2 + d)
# Perímetro critico:
B_cr_m2(d) := 2*d + 2*a.m2 + b.m2
γ_vy(d) := 1 - 1/(1 + 2/3*sqrt((a.m2 + d/2)/(b.m2 + d)))
(P_u_m2 - σ_u*A_cr_m2(d))/(B_cr_m2(d)*d) + γ_vy(d)*(P_u_m2*(d/2))/J_cy∥c'(d) ≤ ϕ_v*4*λ_s*λ*sqrt(f'c*psi)
# Notas del PCA
# ACI 318-08 Pag.957
J_cy∥c'(d) := (2*(a.m2 + d/2)^2*d*(a.m2 + d/2 + 2*(b.m2 + d)) + d^3*(2*(a.m2 + d/2) + b.m2 + d))/(6*(a.m2 + d/2 + b.m2 + d))
(P_u_m2 - σ_u*A_cr_m2(d))/(B_cr_m2(d)*d) + γ_vy(d)*(P_u_m2*(d/2))/J_cy∥c'(d) - ϕ_v*4*λ_s*λ*sqrt(f'c*psi) == 0
(P_u_m2 - σ_u*(a.m2 + d/2)*(b.m2 + d))/((2*d + 2*a.m2 + b.m2)*d) + (1 - 1/(1 + 2/3*sqrt((a.m2 + d/2)/(b.m2 + d))))*(P_u_m2*(d/2))/((2*(a.m2 + d/2)^2*d*(a.m2 + d/2 + 2*(b.m2 + d)) + d^3*(2*(a.m2 + d/2) + b.m2 + d))/(6*(a.m2 + d/2 + b.m2 + d))) - ϕ_v*4*λ_s*λ*sqrt(f'c*psi) == 0
mayorador :=
    if a.m2 == b.m2
        mayorador ← 1
    else
        mayorador ← 1
P_u_m2' := P_u_m2*1/lbf = 219470
a_m2' := a.m2*1/in*mayorador = 23.622
f'c' := f'c/(lbf/in^2) = 3982.54
b_m2' := b.m2*1/in = 23.622
σ_u' := σ_u/(lbf/in^2) = 17.3246
ϕ_v = 0.75
λ_s = 1
λ = 1
d_m2 := (P_u_m2' - σ_u'*(a_m2' + d_m2/2)*(b_m2' + d_m2))/((2*d_m2 + 2*a_m2' + b_m2')*d_m2) + (1 - 1/(1 + 2/3*sqrt((a_m2' + a_m2'/2)/(b_m2' + a_m2'))))*(P_u_m2'*(d_m2/2))/((2*(a_m2' + d_m2/2)^2*d_m2*(a_m2' + d_m2/2 + 2*(b_m2' + d_m2)) + d_m2^3*(2*(a_m2' + d_m2/2) + b_m2' + d_m2))/(6*(a_m2' + d_m2/2 + b_m2' + d_m2))) - ϕ_v*4*sqrt(2/(1 + d_m2/10))*λ*sqrt(f'c') solve, d_m2 → [-13.1242362669 + 13.5281706319i; -13.1242362669 - 13.5281706319i; 18.7311552738]
solve block
    # guess values
    d := 15 cm
    # constraints
    (P_u_m2 - σ_u*A_cr_m2(d))/(B_cr_m2(d)*d) + (1 - 1/(1 + 2/3*sqrt((a.m2 + a.m2/2)/(b.m2 + a.m2))))*(P_u_m2*(d/2))/J_cy∥c'(d) == ϕ_v*4*sqrt(2/(1 + d/(10*in)))*λ*sqrt(f'c*psi)
    # solver
    d := find(d) = 47.5771 cm
end solve block
d_m2 = [-13.1242 + 13.5282i; -13.1242 - 13.5282i; 18.7312]
d_m2 := Re(d_m2) = [-13.1242; -13.1242; 18.7312]
d_m2 := max(d_m2)*in = 18.7312 in
d_m2 := d_m2 = 47.5771 cm
d_m2 = 47.5771 cm
# 2.4 COLUMNA CRITICA CENTRAL | DATOS COLUMNAS CENTRICAS "c"
# Carga critica de interior:
P_u_c := 329.74 tonnef
c = [
    "Columna", "a(cm)", "b(cm)", "Pu(tonnef)";
    8, 60, 60, 190.44;
    9, 60, 60, 201.96;
    10, 60, 60, 198.76;
    11, 60, 30, 92.23;
    14, 60, 60, 137.49;
    15, 60, 60, 326.34;
    16, 60, 60, 329.74;
    17, 60, 30, 206.79;
    20, 60, 60, 139.24;
    21, 60, 60, 103.84;
    22, 60, 60, 192.09;
    23, 60, 30, 75.64
]
# Dimensiones de la columna:
# Dimensión en x:
a.c := 60 cm
# Dimensión en y:
b.c := 60 cm
v_u == (P_u_c - σ_u*A_cr_c(d))/(B_cr_c(d)*d)
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# Área critica:
A_cr_c(d) := (a.c + d)*(b.c + d)
# Perímetro critico:
B_cr_c(d) := 2*(2*d + a.c + b.c)
(P_u_c - σ_u*A_cr_c(d))/(B_cr_c(d)*d) ≤ ϕ_v*4*λ_s*λ*sqrt(f'c*psi)
(P_u_c - σ_u*A_cr_c(d))/(B_cr_c(d)*d) - ϕ_v*4*λ_s*λ*sqrt(f'c*psi) == 0
(P_u_c - σ_u*(a.c + d)*(b.c + d))/(2*(2*d + a.c + b.c)*d) - ϕ_v*4*λ_s*λ*sqrt(f'c*psi) == 0
mayorador :=
    if a.c == b.c
        mayorador ← 1
    else
        mayorador ← 1
P_u_c' := P_u_c*1/lbf = 726952
a_c' := a.c*1/in*mayorador = 23.622
f'c' := f'c/(lbf/in^2) = 3982.54
b_c' := b.c*1/in = 23.622
σ_u' := σ_u/(lbf/in^2) = 17.3246
ϕ_v = 0.75
λ_s = 1
λ = 1
d_c_cen := (P_u_c' - σ_u'*(a_c' + d_c_cen)*(b_c' + d_c_cen))/(2*(2*d_c_cen + a_c' + b_c')*d_c_cen) - ϕ_v*4*sqrt(2/(1 + d_c_cen/10))*λ*sqrt(f'c') solve, d_c_cen → 24.7087131293
solve block
    # guess values
    d := 15 cm
    # constraints
    (P_u_c - σ_u*A_cr_c(d))/(2*(2*d + a.c + b.c)*d) == ϕ_v*4*sqrt(2/(1 + d/(10 in)))*λ*sqrt(f'c*psi)
    # solver
    d := find(d) = 62.7601 cm
end solve block
d_c_cen = 24.7087
d_c_cen := Re(d_c_cen) = 24.7087
d_c_cen := max(d_c_cen)*in = 24.7087 in
d_c := d_c_cen = 62.7601 cm
d_c = 62.7601 cm
d_min := 15 cm  # 13.3.1.2 ACI 318-19
d := max(d_e, d_m1, d_m2, d_c, d_min) = 79.389 cm
# Asumir diámetro de barra
ϕ_long ≡ 19.1 mm
H_min := Ceil(d + rec + ϕ_long, 5 cm) = 90 cm
# Asumir Altura de Fundación
H ≡ 100 cm
H_min := d + rec + ϕ_long = 88.799 cm
# VERIFICACION POR PUNZONAMIENTO
d_real := H - (ϕ_long + rec)
d_real = 90.59 cm
# COLUMNA DE ESQUINA "e"
λ_s_2 :=
    if sqrt(2/(1 + d_real/(10 in))) ≤ 1
        λ_s_2 ← sqrt(2/(1 + d_real/(10 in)))
    if sqrt(2/(1 + d_real/(10 in))) > 1
        λ_s_2 ← 1
    = 0.661792
γ_vx := 1 - 1/(1 + 2/3*sqrt(b.e/a.e)) = 0.4
A_cr_e(d) := (a.e + d/2)*(b.e + d/2)
B_cr_e(d) := d + a.e + b.e
γ_vy := 1 - 1/(1 + 2/3*sqrt(a.e/b.e)) = 0.4
J_cx∥c(d) := ((b.e + d/2)^2*d*(b.e + d/2 + 4*(a.e + d/2)) + d^3*(b.e + d/2 + a.e + d/2))/(6*(b.e + d/2))
J_cy∥c(d) := ((a.e + d/2)^2*d*(a.e + d/2 + 4*(b.e + d/2)) + d^3*(a.e + d/2 + b.e + d/2))/(6*(a.e + d/2))
v_u_e := (P_u_e - σ_u*A_cr_e(d_real))/(B_cr_e(d_real)*d_real) + γ_vx*|P_u_e*(d_real/2)|/J_cx∥c(d_real) + γ_vy*(P_u_e*(d_real/2))/J_cy∥c(d_real) = 6.48485 kgf/cm^2
v_u_e = 6.48485 kgf/cm^2
v_c := ϕ_v*4*λ_s_2*λ*sqrt(f'c*psi) = 8.80889 kgf/cm^2
Ratio_e := v_u_e/v_c = 0.736172
# COLUMNA DE BORDE "m1"
A_cr_m1(d) := (a.m1 + d)*(b.m1 + d/2)
γ_vx(d) := 1 - 1/(1 + 2/3*sqrt((b.m1 + d/2)/(a.m1 + d)))
B_cr_m1(d) := 2*d + a.m1 + 2*b.m1
J_cx∥c'(d) := (2*(b.m1 + d/2)^2*d*(b.m1 + d/2 + 2*(a.m1 + d)) + d^3*(2*(b.m1 + d/2) + a.m1 + d))/(6*(b.m1 + d/2 + a.m1 + d))
v_u_m1 := (P_u_m1 - σ_u*A_cr_m1(d_real))/(B_cr_m1(d_real)*d_real) + γ_vx(d_real)*(P_u_m1*(d_real/2))/J_cx∥c'(d_real) = 7.63698 kgf/cm^2
v_u_m1 = 7.63698 kgf/cm^2
v_c := ϕ_v*4*λ_s_2*λ*sqrt(f'c*psi) = 8.80889 kgf/cm^2
Ratio_m1 := v_u_m1/v_c = 0.866963
# COLUMNA DE BORDE "m2"
A_cr_m2(d) := (a.m2 + d/2)*(b.m2 + d)
γ_vy(d) := 1 - 1/(1 + 2/3*sqrt((a.m2 + d/2)/(b.m2 + d)))
B_cr_m2(d) := 2*d + 2*a.m2 + b.m2
J_cy∥c'(d) := (2*(a.m2 + d/2)^2*d*(a.m2 + d/2 + 2*(b.m2 + d)) + d^3*(2*(a.m2 + d/2) + b.m2 + d))/(6*(a.m2 + d/2 + b.m2 + d))
v_u_m2 := (P_u_m2 - σ_u*A_cr_m2(d_real))/(B_cr_m2(d_real)*d_real) + γ_vy(d_real)*(P_u_m2*(d_real/2))/J_cy∥c'(d_real) = 4.73601 kgf/cm^2
v_u_m2 = 4.73601 kgf/cm^2
v_c := ϕ_v*4*λ_s_2*λ*sqrt(f'c*psi) = 8.80889 kgf/cm^2
Ratio_m2 := v_u_m2/v_c = 0.53764
# COLUMNA CENTRAL "c"
A_cr_c(d) := (a.c + d)*(b.c + d)
B_cr_c(d) := 2*(2*d + a.c + b.c)
v_u_c := (P_u_c - σ_u*A_cr_c(d_real))/(B_cr_c(d_real)*d_real) = 5.53656 kgf/cm^2
v_u_c = 5.53656 kgf/cm^2
v_c := ϕ_v*4*λ_s_2*λ*sqrt(f'c*psi) = 8.80889 kgf/cm^2
Ratio_c := v_u_c/v_c = 0.62852
# 3. ESQUEMA DE DIMENSIONES Y CARGAS
# [Excel component]
    excel["E36"] := a[1]*1/cm
    excel["D37"] := b[1]*1/cm
    excel["F39"] := P[1]/tonnef
    excel["F40"] := P_u[1]/tonnef
    excel["E28"] := a[2]*1/cm
    excel["D29"] := b[2]*1/cm
    excel["F31"] := P[2]/tonnef
    excel["F32"] := P_u[2]/tonnef
    excel["E20"] := a[3]*1/cm
    excel["D21"] := b[3]*1/cm
    excel["F23"] := P[3]/tonnef
    excel["F24"] := P_u[3]/tonnef
    excel["E12"] := a[4]*1/cm
    excel["D13"] := b[4]*1/cm
    excel["F15"] := P[4]/tonnef
    excel["F16"] := P_u[4]/tonnef
    excel["L36"] := a[5]*1/cm
    excel["K37"] := b[5]*1/cm
    excel["M39"] := P[5]/tonnef
    excel["M40"] := P_u[5]/tonnef
    excel["L28"] := a[6]*1/cm
    excel["K29"] := b[6]*1/cm
    excel["M31"] := P[6]/tonnef
    excel["M32"] := P_u[6]/tonnef
    excel["L20"] := a[7]*1/cm
    excel["K21"] := b[7]*1/cm
    excel["M23"] := P[7]/tonnef
    excel["M24"] := P_u[7]/tonnef
    excel["L12"] := a[8]*1/cm
    excel["K13"] := b[8]*1/cm
    excel["M15"] := P[8]/tonnef
    excel["M16"] := P_u[8]/tonnef
    excel["T36"] := a[9]*1/cm
    excel["S37"] := b[9]*1/cm
    excel["U39"] := P[9]/tonnef
    excel["U40"] := P_u[9]/tonnef
    excel["T28"] := a[10]*1/cm
    excel["S29"] := b[10]*1/cm
    excel["U31"] := P[10]/tonnef
    excel["U32"] := P_u[10]/tonnef
    excel["T20"] := a[11]*1/cm
    excel["S21"] := b[11]*1/cm
    excel["U23"] := P[11]/tonnef
    excel["U24"] := P_u[11]/tonnef
    excel["T12"] := a[12]*1/cm
    excel["S13"] := b[12]*1/cm
    excel["U15"] := P[12]/tonnef
    excel["U16"] := P_u[12]/tonnef
    excel["AA36"] := a[13]*1/cm
    excel["Z37"] := b[13]*1/cm
    excel["AB39"] := P[13]/tonnef
    excel["AB40"] := P_u[13]/tonnef
    excel["AA28"] := a[14]*1/cm
    excel["Z29"] := b[14]*1/cm
    excel["AB31"] := P[14]/tonnef
    excel["AB32"] := P_u[14]/tonnef
    excel["AA20"] := a[15]*1/cm
    excel["Z21"] := b[15]*1/cm
    excel["AB23"] := P[15]/tonnef
    excel["AB24"] := P_u[15]/tonnef
    excel["AA12"] := a[16]*1/cm
    excel["Z13"] := b[16]*1/cm
    excel["AB15"] := P[16]/tonnef
    excel["AB16"] := P_u[16]/tonnef
    excel["C9"] := n_x1*1/cm
    excel["F9"] := Lx[1]/cm
    excel["M9"] := Lx[2]/cm
    excel["U9"] := Lx[3]/cm
    excel["AB9"] := n_x2/cm
    excel["AF38"] := n_y1/cm
    excel["AF30"] := Ly[1]/cm
    excel["AF22"] := Ly[2]/cm
    excel["AF14"] := Ly[3]/cm
    excel["AF11"] := n_y2/cm
    excel["J44"] := L/cm
    excel["J45"] := B/cm
    excel["Z44"] := H/cm
    excel["Z45"] := rec/cm
# VERIFICACION DE LA CAPACIDAD DEL SUELO
# - Excentricidad en x:
e_ux := |P_u*x/R_u - L/2| = 0.624167 m
# - Excentricidad en y:
e_uy := |P_u*y/R_u - B/2| = 0.54701 m
# - Longitud Efectiva:
L' := L - 2*e_ux = 18.8217 m
# - Ancho efectivo:
B' := B - 2*e_uy = 23.896 m
# - Área Efectiva
Area' := L'*B' = 449.762 m^2
# - Cohesion
c' := 0 kPa
# - inclinación de la carga sobre la cimentación respecto a la vertical
β := 0 deg
# - Angulo de Fricción interna:
ϕ' := 24 deg
# - Nivel de fundación:
D_f := 4.0 m
# - Nivel freático:
D_w := 0 m
# CAPACIDAD EN EL ESTADO LIMTE DE RESISTENCIA
q_n == c'*N_cm + γ_s*D_f*N_qm*C_wq + 1/2*γ_s*B'*N_γm*C_wγ  # 10.6.3.1.2a-1 AASHTO LRFD 2020 (Pag.1358)
# Factores de capacidad de carga
N_q := tan(45 deg + ϕ'/2)^2*e^(π*tan(ϕ')) = 9.60339
N_c := (N_q - 1)/tan(ϕ') = 19.3235
N_γ := 2*(N_q + 1)*tan(ϕ') = 9.44187
# Factores de forma
S_c := 1 + B'/L'*(N_q/N_c) = 1.63096
S_q := 1 + (B'/L')*tan(ϕ') = 1.56526
S_γ := 1 - 0.4*B'/L' = 0.49216
# Factores de  profundidad
F_prof :=
    F_prof[1, 1] ← "Fcd"
    F_prof[2, 1] ← "Fqd"
    F_prof[3, 1] ← "Fγd"
    if D_f/B' ≤ 1
        if ϕ' == 0 deg
            F_prof[1, 2] ← 1 + 0.4*D_f/B'
            F_prof[2, 2] ← 1
            F_prof[3, 2] ← 1
        if ϕ' > 0 deg
            "Fqd"
            F_prof[2, 2] ← 1 + 2*tan(ϕ')*(1 - sin(ϕ'))^2*(D_f/B')
            F_prof[1, 2] ← F_prof[2, 2] - (1 - F_prof[2, 2])/(N_c*tan(ϕ'))
            F_prof[3, 2] ← 1
    if D_f/B' > 1
        if ϕ' == 0 deg
            F_prof[1, 2] ← 1 + 0.4*atan(D_f/B')
            F_prof[2, 2] ← 1
            F_prof[3, 2] ← 1
        if ϕ' > 0 deg
            F_prof[2, 2] ← 1 + 2*tan(ϕ')*(1 - sin(ϕ'))^2*atan(D_f/B')
            F_prof[1, 2] ← F_prof[2, 2] - (1 - F_prof[2, 2])/(N_c*tan(ϕ'))
            F_prof[3, 2] ← 1
    F_prof
    = ["Fcd", 1.05856; "Fqd", 1.05246; "Fγd", 1]
1 + 0.4*tan(D_f/B')^-1 = 3.36724
1 + 0.4*atan(D_f/B') = 1.06634
1 + 0.4*atan(D_f/B')*π/(180 deg) = 1.06634
F_cd := F_prof[1, 2] = 1.05856
F_qd := F_prof[2, 2] = 1.05246
F_γd := F_prof[3, 2] = 1
F_ci := (1 - β/(90 deg))^2 = 1
F_qi := (1 - β/(90 deg))^2 = 1
F_γi := (1 - β/ϕ') = 1
F_freatico :=
    F_freatico[1, 1] ← "Cwq"
    F_freatico[2, 1] ← "Cwγ"
    if D_w == 0 m
        F_freatico[1, 2] ← 0.5
        F_freatico[2, 2] ← 0.5
    if D_w == D_f
        F_freatico[1, 2] ← 1
        F_freatico[2, 2] ← 0.5
    if D_w > 1.5*B' + D_f
        F_freatico[1, 2] ← 1
        F_freatico[2, 2] ← 1
    F_freatico
    = ["Cwq", 0.5; "Cwγ", 0.5]
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C_wq := F_freatico[1, 2] = 0.5
C_wγ := F_freatico[2, 2] = 0.5
q_efectivo := γ_suelo*D_f = 0.73 kgf/cm^2
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q_u := c'*N_c*S_c*F_cd*F_ci + q_efectivo*N_q*S_q*F_qd*F_qi + 1/2*γ_suelo*B'*N_γ*S_γ*F_γd*F_γi = 21.6815 kgf/cm^2
F_γd = 1
q_u := c'*N_c*S_c*F_ci + q_efectivo*N_q*S_q*F_qd*F_qi*C_wq + 1/2*γ_suelo*B'*N_γ*S_γ*F_γi*C_wγ = 10.8408 kgf/cm^2
F_cd = 1.05856
# CAPACIDAD RESISTENTE DEL SUELO
# Tabla 10.5.5.2.2-1 AASHTO LRFD 2020 (Pag. 1330)
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ϕ_b := 0.45
# - Capacidad Neta | - Capacidad Segura | - Capacidad Resistente
q_u = 1.06312 MPa
q_seg := q_u/FS = 0.354372 MPa
q_r := ϕ_b*q_u = 0.478402 MPa
q_u = 10.8408 kgf/cm^2
q_seg = 3.61359 kgf/cm^2
q_r = 4.87835 kgf/cm^2
if q_r > σ_u
    "Capacidad Suficiente"
else
    "Capacidad Insuficiente"
= "Capacidad Suficiente"
σ_u = 1.21804 kgf/cm^2
# CALCULO DEL K DE BALASTO
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# K30 obtenido de un ensayo de placa
K_30 := 20000.000 kN/m^3
# Para una Zapata Cuadrada de lado:
B_C := sqrt(L*B) = 22.3953 m
# - Para suelos cohesivos | - Para suelos arenosos
k_1 := K_30*0.3 m/B_C
k_2 := K_30*((B_C + 0.3 m)/(2*B_C))^2
# - Para una losa rectangular
# Escoger el tipo de suelo
suelos := ""arenosos""  # list choice: "cohesivos" = ""cohesivos"", "arenosos" = ""arenosos""
(1.38*3) kgf/cm^2 = 405.995 kN/m^2
k_cuadrado :=
    if suelos == "cohesivos"
        k_cuadrado ← k_1
    if suelos == "arenosos"
        k_cuadrado ← k_2
    = 5134.85 kN/m^3
k_rectangular := 2/3*k_cuadrado*(1 + B/(2*L))
k_rectangular = 5554.44 kN/m^3
# Referencias:
# 1. Principles of Fundations Engineering, 2011, Braja M. Das. (Secc. 6.8)
# 2. Diseño de estructuras de Concreto Armado, 2005, T. Harmsen.
# 3. The Reinforced Concrete Design Handbook ACI 318-14. SP-17(14)
# 4. Minimum Design Loads for Buildings and Other Structures. ASCE/SEI 7-10
# 5. Apuntes del Diplomado en Cimentaciones para Edificaciones y Puentes, 2021, Sismica Institute
# 6. Global Structures Company thinking
